// SBML level 3 version 1
// This model was downloaded from BioModels Database
// http://www.ebi.ac.uk/biomodels/

model BMID000000067075()
  // Atrazine degradation
  // Model of “Atrazine degradation” in “Acinetobacter oleivorans DR1”
  // Graphical representation of 'Atrazine degradation (Acinetobacter oleivorans DR1)'
  // (PNG image hosted by the Kyoto Encyclopedia of Genes and Genomes, KEGG).
  // This model has been automatically generated by KEGGtranslator V2.2.0 (KEGGtranslator: visualizing and converting the KEGG PATHWAY database to various formats. Wrzodek C, Dräger A, Zell A. Bioinformatics . 2011, 27 :2314-2315) using information coming from the KEGG PATHWAY Database ( original pathway ).
  // The missing kinetic equations were added by SBMLsqueezer .
  // This model has been produced by the path2models project, it is currently hosted on BioModels Database and identified by: BMID000000067075 .
  // To the extent possible under law, all copyright and related or neighbouring rights to this encoded model have been dedicated to the public domain worldwide. Please refer to CC0 Public Domain Dedication for more information.
  // isDerivedFrom kegg.pathway:acd00791
  // occursIn taxonomy:436717
  // isDescribedBy GO:0019381
  // biomodels.db:BMID000000067075
  // model units - substance: substance, time: time, volume: volume

  // Compartments:
  compartment default = 1;

  // Species:
  // Original Kegg Entry
  // Carbodiimide
  // All given names:
  // Cyanamide
  // Carbodiimide
  // CAS number: 420-04-2
  // Formula: CH2N2
  // Mass: 42.0218
  // Molecular weight: 42.04
  species Cyanamide in default = 1/default;  // cas:420-04-2; pdb-ccd:CNN; hasProperty pubchem.substance:4723; CHEBI:16698
  // Original Kegg Entry
  // 2,4,6-Triamino-1,3,5-triazine
  // All given names:
  // Melamine
  // 2,4,6-Triamino-1,3,5-triazine
  // CAS number: 108-78-1
  // Formula: C3H6N6
  // Mass: 126.0654
  // Molecular weight: 126.1199
  species Melamine in default = 1/default;  // cas:108-78-1; pdb-ccd:AX2; hasProperty pubchem.substance:10930; CHEBI:27915
  // Original Kegg Entry
  // 2-Hydroxy-4,6-diamino-1,3,5-triazine
  // All given names:
  // Ammeline
  // 2-Hydroxy-4,6-diamino-1,3,5-triazine
  // CAS number: 645-92-1
  // Formula: C3H5N5O
  // Mass: 127.0494
  // Molecular weight: 127.1047
  species Ammeline in default = 1/default;  // cas:645-92-1; hasProperty pubchem.substance:10926; CHEBI:28646; kegg.compound:C08733
  // Original Kegg Entry
  // 2,4-Dihydroxy-6-amino-1,3,5-triazine
  // All given names:
  // Ammelide
  // 2,4-Dihydroxy-6-amino-1,3,5-triazine
  // CAS number: 645-93-2
  // Formula: C3H4N4O2
  // Mass: 128.0334
  // Molecular weight: 128.0895
  species Ammelide in default = 1/default;  // cas:645-93-2; hasProperty pubchem.substance:10927; CHEBI:28134; kegg.compound:C08734
  // Original Kegg Entry
  // 2,4-Dihydroxy-6-(cyclopropylamino)-1,3,5-triazine
  // All given names:
  // N-Cyclopropylammelide
  // 2,4-Dihydroxy-6-(cyclopropylamino)-1,3,5-triazine
  // Formula: C6H8N4O2
  // Mass: 168.0647
  // Molecular weight: 168.1533
  species NCyclopropylammelide in default = 1/default; NCyclopropylammelide is "N-Cyclopropylammelide";  // hasProperty pubchem.substance:7846961; CHEBI:21695; kegg.compound:C14149; isDescribedBy ECO:0000313
  // Original Kegg Entry
  // 2-Hydroxy-4-amino-6-(cyclopropylamino)-1,3,5-triazine
  // All given names:
  // N-Cyclopropylammeline
  // 2-Hydroxy-4-amino-6-(cyclopropylamino)-1,3,5-triazine
  // Formula: C6H9N5O
  // Mass: 167.0807
  // Molecular weight: 167.1686
  species NCyclopropylammeline in default = 1/default; NCyclopropylammeline is "N-Cyclopropylammeline";  // hasProperty pubchem.substance:7846960; kegg.compound:C14148; isDescribedBy ECO:0000313
  // Original Kegg Entry
  // 2-Cyclopropylamino-4,6-diamino-s-triazine
  // All given names:
  // Cyromazine
  // Cyclopropylmelamine
  // 2-Cyclopropylamino-4,6-diamino-s-triazine
  // CAS number: 66215-27-8
  // Formula: C6H10N6
  // Mass: 166.0967
  // Molecular weight: 166.1838
  species Cyromazine in default = 1/default;  // cas:66215-27-8; pdb-ccd:AX3; hasProperty pubchem.substance:7846959; CHEBI:30260
  // Original Kegg Entry
  species AOLE_12375 in default = 1/default;  // uniprot:D8JMN7; occursIn kegg.reaction:R00005; hasProperty ec-code:3.5.1.54; isEncodedBy ncbigene:9382896
  // Original Kegg Entry
  // Carbon dioxide
  // All given names:
  // CO2
  // Carbon dioxide
  // CAS number: 124-38-9
  // Formula: CO2
  // Mass: 43.9898
  // Molecular weight: 44.0095
  species CO2 in default = 1/default;  // cas:124-38-9; pdb-ccd:CO2; hasProperty pubchem.substance:3313; CHEBI:16526
  // Original Kegg Entry
  // Allophanic acid
  // All given names:
  // Urea-1-carboxylate
  // Allophanate
  // Allophanic acid
  // CAS number: 625-78-5
  // Formula: C2H4N2O3
  // Mass: 104.0222
  // Molecular weight: 104.0648
  species Allophanate in default = 1/default;  // cas:625-78-5; hasProperty pubchem.substance:4255; CHEBI:9889; occursIn kegg.reaction:R00005
  // Original Kegg Entry
  // N-Isopropylammelide
  // CAS number: 35200-63-6
  // Formula: C6H10N4O2
  // Mass: 170.0804
  // Molecular weight: 170.1692
  species NIsopropylammelide in default = 1/default; NIsopropylammelide is "N-Isopropylammelide";  // cas:35200-63-6; hasProperty pubchem.substance:8782; CHEBI:17247; kegg.compound:C06553
  // Original Kegg Entry
  // Description for “ureC”: urease subunit alpha (EC:3.5.1.5)
  // Description for “ureA”: urease subunit gamma (EC:3.5.1.5)
  species ure in default = 1/default;  // hasVersion uniprot:D8JDS5 uniprot:D8JDS6 uniprot:D8JDS7; occursIn kegg.reaction:R00131; hasProperty ec-code:3.5.1.5; isEncodedBy ncbigene:9383279 ncbigene:9383281 ncbigene:9383280
  // Original Kegg Entry
  // 2,4-Dihydroxy-6-(N'-ethyl)amino-1,3,5-triazine
  // All given names:
  // N-Ethylammelide
  // 2,4-Dihydroxy-6-(N'-ethyl)amino-1,3,5-triazine
  // CAS number: 2630-10-6
  // Formula: C5H8N4O2
  // Mass: 156.0647
  // Molecular weight: 156.1426
  species NEthylammelide in default = 1/default; NEthylammelide is "N-Ethylammelide";  // cas:2630-10-6; hasProperty pubchem.substance:8787; CHEBI:27900; hasProperty 3dmet:B00971
  // Original Kegg Entry
  // Carbamide
  // All given names:
  // Urea
  // Carbamide
  // CAS number: 57-13-6
  // Formula: CH4N2O
  // Mass: 60.0324
  // Molecular weight: 60.0553
  species Urea in default = 1/default;  // cas:57-13-6; pdb-ccd:URE; hasProperty pubchem.substance:3386; CHEBI:16199
  // Original Kegg Entry
  // Deisopropylatrazine
  // CAS number: 1007-28-9
  // Formula: C5H8ClN5
  // Mass: 173.0468
  // Molecular weight: 173.6035
  species Deisopropylatrazine in default = 1/default;  // cas:1007-28-9; hasProperty pubchem.substance:8785; CHEBI:27399; hasProperty 3dmet:B00970
  // Original Kegg Entry
  // Deethylatrazine
  // CAS number: 6190-65-4
  // Formula: C6H10ClN5
  // Mass: 187.0625
  // Molecular weight: 187.6301
  species Deethylatrazine in default = 1/default;  // cas:6190-65-4; hasProperty pubchem.substance:8788; CHEBI:28212; kegg.compound:C06559
  // Original Kegg Entry
  // Biuret
  // CAS number: 108-19-0
  // Formula: C2H5N3O2
  // Mass: 103.0382
  // Molecular weight: 103.08
  species Biuret in default = 1/default;  // cas:108-19-0; hasProperty pubchem.substance:8784; CHEBI:18138; hasProperty 3dmet:B00969
  // Original Kegg Entry
  // 2-Chloro-4-hydroxy-6-amino-1,3,5-triazine
  // CAS number: 38862-29-2
  // Formula: C3H3ClN4O
  // Mass: 145.9995
  // Molecular weight: 146.5351
  species SId_Chloro4hydroxy6amino135triazine in default = 1/default; SId_Chloro4hydroxy6amino135triazine is "2-Chloro-4-hydroxy-6-amino-1,3,5-triazine";  // cas:38862-29-2; hasProperty pubchem.substance:10928; CHEBI:27797; hasProperty 3dmet:B01112
  // Original Kegg Entry
  // 4-(Ethylamino)-2-hydroxy-6-(isopropylamino)-1,3,5-triazine
  // All given names:
  // Hydroxyatrazine
  // 4-(Ethylamino)-2-hydroxy-6-(isopropylamino)-1,3,5-triazine
  // CAS number: 2163-68-0
  // Formula: C8H15N5O
  // Mass: 197.1277
  // Molecular weight: 197.2376
  species Hydroxyatrazine in default = 1/default;  // cas:2163-68-0; hasProperty pubchem.substance:8781; CHEBI:18316; kegg.compound:C06552
  // Original Kegg Entry
  // Cyanuric acid
  // CAS number: 108-80-5
  // Formula: C3H3N3O3
  // Mass: 129.0174
  // Molecular weight: 129.0742
  species Cyanuric_acid in default = 1/default;  // cas:108-80-5; hasProperty pubchem.substance:8783; CHEBI:38028; hasProperty 3dmet:B00968
  // Original Kegg Entry
  // Atrazine
  // CAS number: 1912-24-9
  // Formula: C8H14ClN5
  // Mass: 215.0938
  // Molecular weight: 215.6833
  species Atrazine in default = 1/default;  // cas:1912-24-9; pdb-ccd:ATZ; hasProperty pubchem.substance:8780; CHEBI:15930
  // Original Kegg Entry
  // Deisopropylhydroxyatrazine
  // CAS number: 7313-54-4
  // Formula: C5H9N5O
  // Mass: 155.0807
  // Molecular weight: 155.1579
  species Deisopropylhydroxyatrazine in default = 1/default;  // cas:7313-54-4; hasProperty pubchem.substance:8786; CHEBI:28363; kegg.compound:C06557
  // Original Kegg Entry
  // Deisopropyldeethylatrazine
  // CAS number: 3397-62-4
  // Formula: C3H4ClN5
  // Mass: 145.0155
  // Molecular weight: 145.5504
  species Deisopropyldeethylatrazine in default = 1/default;  // cas:3397-62-4; hasProperty pubchem.substance:8789; CHEBI:27726; hasProperty 3dmet:B00972
  // Original Kegg Entry
  // Water
  // All given names:
  // H2O
  // Water
  // CAS number: 7732-18-5
  // Formula: H2O
  // Mass: 18.0106
  // Molecular weight: 18.0153
  species H2O in default = 1/default;  // cas:7732-18-5; pdb-ccd:HOH; hasProperty pubchem.substance:3303; CHEBI:15377
  // Original Kegg Entry
  // Ammonia
  // All given names:
  // NH3
  // Ammonia
  // CAS number: 7664-41-7
  // Formula: NH3
  // Mass: 17.0265
  // Molecular weight: 17.0305
  species NH3 in default = 1/default;  // cas:7664-41-7; pdb-ccd:NH3; hasProperty pubchem.substance:3316; CHEBI:16134

  // Reactions:
  // Definition of “RN:R00005”: Urea-1-carboxylate + H2O <=> 2 CO2 + 2 NH3
  // Equation for “RN:R00005”: C01010 + C00001 <=> 2 C00011 + 2 C00014
  // Occurs in:
  // Arginine and proline metabolism
  // Atrazine degradation
  // Metabolic pathways
  // Microbial metabolism in diverse environments
  rnR00005: Allophanate + H2O => 2 CO2 + 2 NH3; AOLE_12375*default*(kcat_rnR00005_AOLE_12375*Allophanate*default/(kmc_rnR00005_Allophanate_AOLE_12375 + Allophanate*default)); rnR00005 is "rn:R00005";  // modifiers: AOLE_12375; kegg.reaction:R00005; occursIn kegg.pathway:rn00330 kegg.pathway:rn00791 kegg.pathway:rn01100 kegg.pathway:rn01120; isDescribedBy ECO:0000313
    kcat_rnR00005_AOLE_12375 = 1 per_SECOND; kmc_rnR00005_Allophanate_AOLE_12375 = 1 substance;
  // Definition of “RN:R00131”: Urea + H2O <=> CO2 + 2 NH3
  // Equation for “RN:R00131”: C00086 + C00001 <=> C00011 + 2 C00014
  // Occurs in:
  // Purine metabolism
  // Arginine and proline metabolism
  // Atrazine degradation
  // Metabolic pathways
  // Microbial metabolism in diverse environments
  rnR00131: Urea + H2O => CO2 + 2 NH3; ure*default*(kcat_rnR00131_ure*Urea*default/(kmc_rnR00131_Urea_ure + Urea*default)); rnR00131 is "rn:R00131";  // modifiers: ure; kegg.reaction:R00131; occursIn kegg.pathway:rn00230 kegg.pathway:rn00330 kegg.pathway:rn00791 kegg.pathway:rn01100; isDescribedBy ECO:0000313
    kcat_rnR00131_ure = 1 per_SECOND; kmc_rnR00131_Urea_ure = 1 substance;

  // Unit definitions:
  unit time = second; time is "Predefined unit time";
  unit volume = litre; volume is "Predefined unit volume";
  unit substance = mole; substance is "Predefined unit substance";
  unit per_SECOND = 1 / second; per_SECOND is "per second";
end
